// SBML level 2 version 4

model AKAP79()

  // Compartments:
  compartment Compartment = 1 liter;

  // Species:
  species Rii in Compartment = 6.3;
  species cAMP in Compartment = 0;
  species RiiP in Compartment = 0;
  species Rii_C in Compartment = 0.63;
  species RiiP_cAMP in Compartment = 0;
  species RiiP_C in Compartment = 0;
  species RiiP_C_cAMP in Compartment = 0;
  species C in Compartment = 0;
  species Rii_cAMP in Compartment = 0;
  species Rii_C_cAMP in Compartment = 0;
  species CaN in Compartment = 1.5;
  species RiiP_CaN in Compartment = 0;
  species RiiP_cAMP_CaN in Compartment = 0;
  species AKAR4 in Compartment = 0.2;
  species AKAR4_C in Compartment = 0;
  species AKAR4p in Compartment = 0;
  species $kf_RiiP_cAMP_CaN__CaNXRii_cAMP in Compartment;
  species $kb_RiiPxCaN__RiiP_CaN in Compartment;
  species $kf_RiiP_CaN__RiixCaN in Compartment;
  species $kb_CaNxRiiP_cAMP__RiiP_cAMP_CaN in Compartment;
  species $kf_RiiPxCaN__RiiP_CaN in Compartment;
  species $kf_CaNxRiiP_cAMP__RiiP_cAMP_CaN in Compartment;
  species $kb_RiiP_CxcAMP__RiiP_C_cAMP in Compartment;
  species $AKAR4pOUT in Compartment;

  // Parameters:
  kf_Rii_C__RiiP_C = 33 one_over_second;
  kf_RiiP_CxcAMP__RiiP_C_cAMP = 0.496 one_over_micromolarity_second;
  kf_RiiP_cAMPxC__RiiP_C_cAMP = 0.00545 one_over_micromolarity_second;
  kb_RiiP_cAMPxC__RiiP_C_cAMP = 0.0156 one_over_second;
  kb_RiiPXcAMP__RiiP_cAMP = 0.0016 one_over_second;
  kf_RiiPXcAMP__RiiP_cAMP = 0.015 one_over_micromolarity_second;
  kf_RiiPxC__RiiP_C = 0.038 one_over_micromolarity_second;
  kb_RiiPxC__RiiP_C = 0.0026 one_over_second;
  kf_cAMPxRii__Rii_cAMP = 0.015 one_over_micromolarity_second;
  kb_cAMPxRii__Rii_cAMP = 0.0016 one_over_second;
  kf_Rii_CxcAMP__Rii_C_cAMP = 0.496 one_over_micromolarity_second;
  kb_Rii_CxcAMP__Rii_C_cAMP = 1.413 one_over_second;
  kf_RiixC__Rii_C = 2.1 one_over_micromolarity_second;
  kf_Rii_cAMPxC__Rii_C_cAMP = 0.2984 one_over_micromolarity_second;
  kb_Rii_cAMPxC__Rii_C_cAMP = 0.018 one_over_second;
  kf_Rii_C_cAMP__RiiP_C_cAMP = 33 one_over_second;
  kb_RiixC__Rii_C = 0.0003 one_over_second;
  AKAPoff_1 = 2.6 one_over_second;
  AKAPoff_3 = 20 one_over_second;
  AKAPon_1 = 0.45 one_over_second;
  AKAPon_3 = 2 one_over_second;
  kf_C_AKAR4 = 0.018 one_over_micromolarity_second;
  kb_C_AKAR4 = 0.106 one_over_second;
  kcat_AKARp = 10.2 one_over_second;
  kmOFF = 100 micromolarity;
  kmON = 1 micromolarity;
  KD_T = 0.7 micromolarity;
  b_AKAP = 0 dimensionless;

  // Assignment rules:
  kf_RiiP_cAMP_CaN__CaNXRii_cAMP := b_AKAP*AKAPon_1 + (1 - b_AKAP)*AKAPoff_1;
  kb_RiiPxCaN__RiiP_CaN := b_AKAP*AKAPon_3 + (1 - b_AKAP)*AKAPoff_3;
  kf_RiiP_CaN__RiixCaN := b_AKAP*AKAPon_1 + (1 - b_AKAP)*AKAPoff_1;
  kb_CaNxRiiP_cAMP__RiiP_cAMP_CaN := b_AKAP*AKAPon_3 + (1 - b_AKAP)*AKAPoff_3;
  kf_RiiPxCaN__RiiP_CaN := b_AKAP*((kb_RiiPxCaN__RiiP_CaN + kf_RiiP_cAMP_CaN__CaNXRii_cAMP)/kmON) + (1 - b_AKAP)*(kb_RiiPxCaN__RiiP_CaN + kf_RiiP_cAMP_CaN__CaNXRii_cAMP)/kmOFF;
  kf_CaNxRiiP_cAMP__RiiP_cAMP_CaN := b_AKAP*((kb_CaNxRiiP_cAMP__RiiP_cAMP_CaN + kf_RiiP_CaN__RiixCaN)/kmON) + (1 - b_AKAP)*(kb_CaNxRiiP_cAMP__RiiP_cAMP_CaN + kf_RiiP_CaN__RiixCaN)/kmOFF;
  kb_RiiP_CxcAMP__RiiP_C_cAMP := kf_RiiP_CxcAMP__RiiP_C_cAMP*KD_T;
  AKAR4pOUT := AKAR4p*5*71.67 + 100;

  // Reactions:
  reaction_51: Rii_C => RiiP_C; kf_Rii_C__RiiP_C*Rii_C*Compartment;
  reaction_14: RiiP + C -> RiiP_C; (kf_RiiPxC__RiiP_C*RiiP*C - kb_RiiPxC__RiiP_C*RiiP_C)*Compartment;
  reaction_12: RiiP_C + cAMP -> RiiP_C_cAMP; (kf_RiiP_CxcAMP__RiiP_C_cAMP*RiiP_C*cAMP - kb_RiiP_CxcAMP__RiiP_C_cAMP*RiiP_C_cAMP)*Compartment;
  reaction_43: cAMP + RiiP -> RiiP_cAMP; (kf_RiiPXcAMP__RiiP_cAMP*cAMP*RiiP - kb_RiiPXcAMP__RiiP_cAMP*RiiP_cAMP)*Compartment;
  reaction_23: RiiP_cAMP + C -> RiiP_C_cAMP; (kf_RiiP_cAMPxC__RiiP_C_cAMP*RiiP_cAMP*C - kb_RiiP_cAMPxC__RiiP_C_cAMP*RiiP_C_cAMP)*Compartment;
  reaction_78: cAMP + Rii -> Rii_cAMP; (kf_cAMPxRii__Rii_cAMP*cAMP*Rii - kb_cAMPxRii__Rii_cAMP*Rii_cAMP)*Compartment;
  reaction_56: Rii_C + cAMP -> Rii_C_cAMP; (kf_Rii_CxcAMP__Rii_C_cAMP*Rii_C*cAMP - kb_Rii_CxcAMP__Rii_C_cAMP*Rii_C_cAMP)*Compartment;
  reaction_76: Rii_cAMP + C -> Rii_C_cAMP; (kf_Rii_cAMPxC__Rii_C_cAMP*Rii_cAMP*C - kb_Rii_cAMPxC__Rii_C_cAMP*Rii_C_cAMP)*Compartment;
  reaction_62: Rii_C_cAMP => RiiP_C_cAMP; kf_Rii_C_cAMP__RiiP_C_cAMP*Rii_C_cAMP*Compartment;
  reaction_58: Rii + C -> Rii_C; (kf_RiixC__Rii_C*Rii*C - kb_RiixC__Rii_C*Rii_C)*Compartment;
  reaction_44: RiiP + CaN -> RiiP_CaN; (kf_RiiPxCaN__RiiP_CaN*RiiP*CaN - kb_RiiPxCaN__RiiP_CaN*RiiP_CaN)*Compartment;
  reaction_33: CaN + RiiP_cAMP -> RiiP_cAMP_CaN; (kf_CaNxRiiP_cAMP__RiiP_cAMP_CaN*CaN*RiiP_cAMP - kb_CaNxRiiP_cAMP__RiiP_cAMP_CaN*RiiP_cAMP_CaN)*Compartment;
  reaction_48: RiiP_CaN => Rii + CaN; kf_RiiP_CaN__RiixCaN*RiiP_CaN*Compartment;
  reaction_37: RiiP_cAMP_CaN => CaN + Rii_cAMP; kf_RiiP_cAMP_CaN__CaNXRii_cAMP*RiiP_cAMP_CaN*Compartment;
  reaction_1: C + AKAR4 -> AKAR4_C; (kf_C_AKAR4*C*AKAR4 - kb_C_AKAR4*AKAR4_C)*Compartment;
  reaction_2: AKAR4_C => AKAR4p + C; kcat_AKARp*AKAR4_C*Compartment;

  // Unit definitions:
  unit substance = 1e-6 mole;
  unit time = second;
  unit volume = litre;
  unit area = (1e-6 metre)^2;
  unit length = 1e-6 metre;
  unit one_over_s = dimensionless / second;
  unit one_over_micromolarity_s = dimensionless * litre / (1e-6 mole * second);
  unit micromole_per_liter = 1e-6 mole / litre;
  unit one_over_second = dimensionless / second;
  unit one_over_micromolarity_second = dimensionless * litre / (1e-6 mole * second);
  unit micromolarity = 1e-6 mole / litre;
  unit dimensionless = dimensionless;
  unit liter = litre;
end
