// SBML level 2 version 4

model AKAR4cl()

  // Compartments:
  compartment Compartment = 1 liter;

  // Species:
  species AKAR4 in Compartment = 0.2;
  species AKAR4_C in Compartment = 0;
  species AKAR4p in Compartment = 0;
  species C in Compartment = 0;
  species $AKAR4pOUT in Compartment;

  // Parameters:
  kf_C_AKAR4 = 0.018 one_over_micromolarity_second;
  kb_C_AKAR4 = 0.106 one_over_second;
  kcat_AKARp = 10.2 one_over_second;

  // Assignment rules:
  AKAR4pOUT := 108 + 380*AKAR4p;

  // Reactions:
  reaction_1: C + AKAR4 -> AKAR4_C; (kf_C_AKAR4*C*AKAR4 - kb_C_AKAR4*AKAR4_C)*Compartment;
  reaction_2: AKAR4_C => AKAR4p + C; kcat_AKARp*AKAR4_C*Compartment;

  // Unit definitions:
  unit substance = 1e-6 mole;
  unit time = second;
  unit volume = litre;
  unit area = (1e-6 metre)^2;
  unit length = 1e-6 metre;
  unit micromole_per_liter = 1e-6 mole / litre;
  unit one_over_micromolarity_second = dimensionless * litre / (1e-6 mole * second);
  unit one_over_second = dimensionless / second;
  unit liter = litre;
end
